ORIGIN := 1
n := 28
Kjm := 0.25
E0 := 30
t1 := rexp(n, 0.05)
t := sort(t1)
Given
sum((1/(E0 - (i - 1)) - Kjm*t[i]), i = 1 .. n) == 0
sum((1/(Kjm*t[i]) - (E0 - (i - 1))), i = 1 .. n) == 0
t = [0.06419; 0.231161; 0.902043; 2.64851; 2.96491; 3.89993; 4.8843; 4.97799; 6.83586; 9.83705; 10.1578; 10.7227; 12.3481; 12.6349; 13.0833; 15.4406; 15.9353; 20.9788; 23.8155; 32.8679; 34.9592; 35.8853; 38.3039; 42.5592; 47.8477; 57.2745; 94.3832; 133.4]
[Kjm1; E01] := Minerr(Kjm, E0)
Kjm1 = 0.0797093
E01 = 24.0188
λnext := |Kjm1*(E01 - n)|
λnext = 0.317336
mnext := 1/λnext
mnext = 3.15124
tnext := t[n] + rnd(2)
Pnext := e^(-λnext*tnext)
Pnext = 2.41914e-19
