B := 6
a := 2
f(t, B, a) := B^a/Γ(a)*t^(a - 1)*e^(-B*t)
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F(t, a, b) := integral(f(t, b, a), t = 0 .. t)
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# 1. Плотность распределения
# 3. Начальные моменты | 2. Функция распределения
a1(a, b) := integral(t*f(t, b, a), t = 0 .. 100)
# 4. Мат. ожидание
a2(a, b) := integral(t^2*f(t, b, a), t = 0 .. 100)
m1(a, b) := a1(a, b)
m1(1, 5) = 0.2
m2(a, b) := a/b
m2(1, 5) = 0.2
a3(a, b) := integral(t^3*f(t, b, a), t = 0 .. 100)
# 5. Мода
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d/dt(f(t, β, α)) == 0 solve, t → {
    [0; (α - 1)/β] if 0 ≤ Re(α) and 0 < α
    (α - 1)/β if α ≤ 0 ≤ Re(α) or α ≤ 0 and β ≠ 0 and Re(α) < 0 or β ≠ 0 and α ≠ 1 and 0 < α and Re(α) < 0
}
root(d/dt(f(t, 5, 2)), t, 0, 50) = 0.2
# 6. Медиана
F(t, a, b) == 1/2 solve, t →  # error: Решение не было найдено.
D1(a, b) := a2(a, b) - a1(a, b)^2
root(F(t, 5, 4) - 1/2, t, 0, 50) = 1.16773
D2(a, b) := a/b^2
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D1(1, 5) = 0.04
D2(-2, 5) = -0.08
# 7. Дисперсия
# 8. Среднее квадратичное отклонение
σ(a, b) := sqrt(D1(a, b))
σ(1, 5) = 0.2
# 9. Коэфициент асимметрии
μ3(a, b) := 2*a1(a, b)^3 - 3*a1(a, b)*a2(a, b) + a3(a, b)
μ3(1, 5) = 0.016
S(a, b) := μ3(a, b)/σ(a, b)^3
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S(1, 5) = 2
n := 10000
i := 1 .. n
bin := 40
X1 := rgamma(n, 6)
lower := floor(min(X1))
X2 := sort(X1)
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upper := ceil(max(X1))
h := (upper - lower)/bin
j := 1 .. bin + 1
int[j] := lower + h*j
int := int + h/2
M1 := sum(X1[i], i = 1 .. n - 1)/n
t := hist(int, X1)/n
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Dis1 := sum(X1[k]^2, k = 1 .. n - 1)/n - (sum(X1[k], k = 1 .. n - 1)/n)^2
m1(6, 1) = 6
D1(6, 1) = 6
M1 = 5.99311
Dis1 = 6.17459
σ(6, 1) = 2.44949
CKO := sqrt(Dis1) = 2.48487
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