Гамма - распределение
# 1. Исходные данные
Y := rgamma(10000, 2)
Y := sort(Y)
N0 := rows(Y)
N(t) :=
    i ← 0
    while t > Y[i]
        i ← i + 1
    N0 - i
h := 0.05
Tmax := round(max(Y)/h, 0)
i := 0 .. Tmax
T[i] := i*h
i := 0 .. Tmax - 1
# 2. Функция надежности
f(t, a, b) := b/(t^2*sqrt(2*π))*e^(-1/2*(b/t - a)^2)
P1[i] := N(T[i])/N0
P1[Tmax] := 0
P(t, a, b) := 1 - integral(f(t, a, b), t = 0 .. t)
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# 3. Функция ненадежности
Q1[i] := (N0 - N(T[i]))/N0
Q(t, a, b) := 1 - P(t, a, b)
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# 4. Функция частоты
i := 0 .. Tmax - 2
f1[i] := (N(T[i]) - N(T[i] + h))/(N0*h)
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# 5. Функция интенсивности
i := 0 .. Tmax - 2
λ(t, a, b) := f(t, a, b)/P(t, a, b)
λ1[i] := (N(T[i]) - N(T[i] + h))/(N(T[i])*h)
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